*Heading
** Job name: my_job Model name: my_model
** Generated by: Abaqus/CAE 6.13-4
*Preprint, echo=NO, model=NO, history=NO, contact=NO
**
** PARTS
**
*Part, name=meshedPart
*Node
      1,   2305.80005,   25.3936977,   381.356354
      2,   2305.80005,   20.5296974,   381.356354
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** ...etc
*Element, type=C3D8
1, 8, 5, 6, 7, 1, 2, 3, 4
2,  5,  8, 11, 12,  2,  1,  9, 10
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**...etc
*Element, type=C3D8R
19561, 80396, 80393, 80394, 80395, 80389, 80390, 80391, 80392
19562, 80404, 80401, 80402, 80403, 80397, 80398, 80399, 80400
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**...etc
*Element, type=C3D4
  54358, 459514, 445765, 458428, 458429
  54359, 459514, 445764, 458428, 445765
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**...etc
*Element, type=COH3D8
1392691,      8,      7,      6,      5, 246399, 245119, 245120, 246400
1392692,      1,      2,      3,      4, 246397, 246398, 245118, 245117
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**...etc
*Nset, nset=matrixRearFace
  64437,  64438,  64439,  64440,  64593,  64594
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**...etc
*Elset, elset=matrixRearFace
  15654,  15692,  15733,  15771,  15812,  15850
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**...etc
** Additional Sets
** Additional Sections
*Orientation, name=Ori-23
0.981350892220155, -0.0310421302225021, 0.189701904286579, -0.189607068921132, 0.00599765830063189, 0.981841732414164
1, 0.
** Region: (fiberSection:misalignedFibers), (Material Orientation:fiber-21)
*Elset, elset=_I27, internal, generate
 54324,  54357,      1
** Section: fiberSection
*Solid Section, elset=_I27, orientation=Ori-23, material=fiberMat
,
** Section: matrixSection
*Solid Section, elset=matrix, material=matrixMat
,
** Section: interfaceSection
*Cohesive Section, elset=interface, material=interfaceMat, response=TRACTION SEPARATION
,
*End Part
**
**
** ASSEMBLY
**
*Assembly, name=Assembly
**
*Instance, name=meshedPart-1, part=meshedPart
*End Instance
**
*End Assembly
**
** MATERIALS
**
*Material, name=fiberMat
*Damage Initiation, criterion=DUCTILE
 0.0001,0.,0.
*Damage Evolution, type=ENERGY
0.,
*Density
 2e-07,
*Elastic
263000., 0.2
*Plastic
5000.,0.
*Material, name=interfaceMat
*Damage Initiation, criterion=QUADS
50.,50.,50.
*Damage Evolution, type=ENERGY
 0.025,
*Density
 1e-09,
*Elastic, type=TRACTION
 1e+06, 1e+06, 1e+06
*Material, name=matrixMat
*Density
 2e-07,
*Elastic
3000., 0.37
*Plastic
 64.41,      0.
  73.5, 0.02572
